a := 6
b := 12
c := 20
d := 25
theta2 := 65 deg
k1 := d/a = 4.16667
k2 := d/c = 1.25
k3 := (a^2 - b^2 + c^2 + d^2)/(2*a*c) = 3.82083
k4 := d/b = 2.08333
A := cos(theta2) - k1 - k2*cos(theta2) + k3 = -0.451488
k5 := (c^2 - d^2 - a^2 - b^2)/(2*a*b)
B := -2*sin(theta2) = -1.81262
C := k1 - (k2 + 1)*cos(theta2) + k3 = 7.03661
D := cos(theta2) - k1 + k4*cos(theta2) + k5 = -5.67609
E := -2*sin(theta2) = -1.81262
F := k1 + (k4 - 1)*cos(theta2) + k5 = 1.812
theta4 := 2*atan((-B - sqrt(B^2 - 4*A*C))/(2*A)) = 135.122 deg
theta3 := 2*atan((-E - sqrt(E^2 - 4*D*F))/(2*D)) = 46.29 deg
